<?xml version="1.0"?>
<!-- Generated by Aero-Matic v 0.8

     Inputs:
                horsepower: 35
                     pitch: fixed
            max engine rpm: 1700
        prop diameter (ft): 6.8

     Outputs:
              max prop rpm: 2127.0
                gear ratio:   1.00
                       Cp0: 0.033614
                       Ct0: 0.02908
       static thrust (lbs): 89.01
-->

<propeller name="prop_g_blimpR">
  <ixx> 1.870 </ixx>
  <diameter unit="IN"> 88.0 </diameter>
  <numblades> 4 </numblades>
  <minpitch> 24 </minpitch>
  <maxpitch> 24 </maxpitch>
  <gearratio>0.31 </gearratio>

  <table name="C_THRUST" type="internal">
     <tableData>
       0.0  0.0312
       0.1  0.0289
       0.2  0.0269
       0.3  0.0251
       0.4  0.0229
       0.5  0.0199
       0.6  0.0168
       0.7  0.0125
       0.8  0.0074
       1.0  0.0022
       1.2  -0.0114
       1.4  -0.0205
     </tableData>
  </table>


  <table name="C_POWER" type="internal">
     <tableData>
       0.0  0.0336
       0.1  0.0336
       0.2  0.0328
       0.3  0.0320
       0.4  0.0302
       0.5  0.0277
       0.6  0.0254
       0.7  0.0213
       0.8  0.0174
       1.0  0.0062
       1.2  -0.0099
       1.4  -0.0299
       1.6  -0.0508
     </tableData>
  </table>

</propeller>
