<?xml version="1.0"?>
<!--
     Model-G-BlimpJSB flight model for FlightGear.

    Copyright (C) 2006 - 2013  Anders Gidenstam  (anders(at)gidenstam.org)

    This program is free software; you can redistribute it and/or modify
    it under the terms of the GNU General Public License as published by
    the Free Software Foundation; either version 2 of the License, or
    (at your option) any later version.

    This program is distributed in the hope that it will be useful,
    but WITHOUT ANY WARRANTY; without even the implied warranty of
    MERCHANTABILITY or FITNESS FOR A PARTICULAR PURPOSE.  See the
    GNU General Public License for more details.

    You should have received a copy of the GNU General Public License
    along with this program; if not, write to the Free Software
    Foundation, Inc., 59 Temple Place, Suite 330, Boston, MA  02111-1307  USA

-->
<?xml-stylesheet type="text/xsl" href="http://jsbsim.sourceforge.net/JSBSim.xsl"?>
<fdm_config name="Model-G-BlimpJSB" version="2.0" release="ALPHA"
 xmlns:xsi="http://www.w3.org/2001/XMLSchema-instance"
 xsi:noNamespaceSchemaLocation="http://jsbsim.sourceforge.net/JSBSim.xsd">

 <fileheader>

  <description>Free-flying gas balloon of the type ZF Navy free balloon.</description>

  <author>Anders Gidenstam</author>
  <email>anders at gidenstam dot org</email>

  <filecreationdate> 2006-03-24 </filecreationdate>
  <version>$Id: Model-G-BlimpJSB.xml,v 1.34, modded 2014/10/04 20:42:42 LesterBoffo/anders Exp $</version>

  <license>
   <licenseName>GPL</licenseName>
   <licenseURL>http://www.gnu.org/licenses/gpl.html</licenseURL>
  </license>
  <note>
   This model was created using publicly available data, publicly available
   technical reports, textbooks, and guesses. It contains no proprietary or
   restricted data. It has been validated only to the extent that it may seem
   to "fly right", and possibly to comply to published, publicly known,
   performance data (maximum speed, endurance, etc.).

   This model is distributed in the hope that it will be useful,
   but WITHOUT ANY WARRANTY; without even the implied warranty of
   MERCHANTABILITY or FITNESS FOR A PARTICULAR PURPOSE.  See the
   GNU General Public License for more details.
  </note>

 </fileheader>

 <!--
 ==== Metrics ===============================================================
 -->
 <metrics>
  <documentation>
   NOTE: The origin of the structural frame coordinate system is in the center
         of the bottom of the basket.
	 x/y/z = back/right/up
  </documentation>

  <wingarea unit="M2"> 670.18 </wingarea> <!--  Must be large to avoid  -->
  <wingspan unit="M">   7.163 </wingspan> <!--  numerical problems.     -->
  <chord unit="FT"> 121.2 </chord>
  <htailarea unit="FT2"> 45.5 </htailarea>
  <htailarm unit="FT"> 25.9 </htailarm>
  <vtailarea unit="FT2"> 29.4 </vtailarea>
  <vtailarm unit="FT"> 25.42 </vtailarm>
  <location name="AERORP" unit="M">
   <x> 0.284 </x>
   <y> 0 </y>
   <z> 8.112 </z>
  </location>
  <location name="EYEPOINT" unit="M">
   <x> 0 </x>
   <y> 0 </y>
   <z> 0 </z>
  </location>
  <location name="VRP" unit="M">
   <x> 0 </x>
   <y> 0 </y>
   <z> 0 </z>
  </location>
 </metrics>

 <!--
 ==== Mass balance ==========================================================
 -->
 <mass_balance>

  <documentation>
    Mass distribution according to
    "The Navy's venerable airship Los Angles", W.F. Althoff.

    Envelope     225 lbs.
    Net          101 lbs.
    Basket        97 lbs.
    Load ring     20 lbs.
    Valve         14 lbs.
    Valve cord     4 lbs.
    Drag rope     30 lbs.
    Instruments    7 lbs.
    Com. gear      9 lbs.
  </documentation>
  <documentation>
    Rough model to estimate CG and inertia tensor.

    % Envelope + net (Thin sphere)
    m_e = 147.87  % KG
    r   = 6.185   % M

    % Basket + Drag rope + Instruments + Com. gear (Point mass)
    m_b = 64.864  % KG

    % Load ring (Point mass)
    m_lr = 9.072  % KG

    % Top valve + cord (Point mass)
    m_v = 8.165   % KG

    % CG for envelope: (0, 0, 15.545)
    % Inertia tensor for envelope. Since we take CG_e as CG we are done.
    Ixx = 2/3 * m_e * r^2
    Iyy = 2/3 * m_e * r^2
    Izz = 2/3 * m_e * r^2
    Ixy = Ixz = Iyz = 0
  </documentation>

  <ixx unit="KG*M2"> 5771.1 </ixx>
  <iyy unit="KG*M2"> 30771.1 </iyy>
  <izz unit="KG*M2"> 30771.1 </izz>
  <ixy unit="KG*M2">   -0   </ixy>
  <ixz unit="KG*M2">   -0   </ixz>
  <iyz unit="KG*M2">   -0   </iyz>
  <emptywt unit="KG"> 347.87 </emptywt>
  <location name="CG" unit="M">
   <x>  0     </x>
   <y>  0     </y>
   <z> 3.405 </z>
  </location>

  <pointmass name="Pilot">
   <weight unit="KG"> 73.0 </weight>
   <location name="POINTMASS" unit="M">
     <x> -1.03 </x>
    <y>  0.0 </y>
    <z>  1.36 </z>
   </location>
  </pointmass>
  <pointmass name="Payload">
   <weight unit="KG"> 0.0 </weight>
   <location name="POINTMASS" unit="M">
    <x> 1.195 </x>
    <y>  0.9 </y>
    <z>  1.0 </z>
   </location>
  </pointmass>
  <pointmass name="Ballast">
   <weight unit="KG"> 850.0 </weight>
   <location unit="M">
    <x> 0.0 </x>
    <y> 0.0 </y>
    <z> 0.89 </z>
   </location>
  </pointmass>
  <pointmass name="Engine">
   <weight unit="KG"> 83.0 </weight>
   <location name="POINTMASS" unit="M">
    <x> 0.860 </x>
    <y>  0.00 </y>
    <z> 0.10 </z>
   </location>
  </pointmass>
  <pointmass name="Frame">
   <weight unit="KG"> 64.864 </weight>
   <location name="POINTMASS" unit="M">
    <x> 0    </x>
    <y> 0    </y>
    <z> 0.47 </z>
   </location>
  </pointmass>
  <pointmass name="staywires">
   <weight unit="KG"> 29.072 </weight>
   <location name="POINTMASS" unit="M">
    <x> -0.285     </x>
    <y> 0     </y>
    <z> 4.340 </z>
   </location>
  </pointmass>
  <pointmass name="valve">
   <weight unit="KG"> 8.164 </weight>
   <location name="POINTMASS" unit="M">
    <x>  0    </x>
    <y>  0    </y>
    <z> 14.73 </z>
   </location>
  </pointmass>

 </mass_balance>

 <!--
 === Gas cell ===============================================================
 -->

 <buoyant_forces>

  <!-- External environment properties -->
  <!-- Set from Nasal. -->
  <property> environment/sun-angle-rad </property>
  <property> environment/sun-radiation-norm </property>

  <!-- Gas cell constants -->

  <!-- Conductivity [lb / (K ft sec)] (Guess) -->
  <property value="0.05"> buoyant_forces/heat-coeffs/conductivity </property>
  <!-- Emissivity [0,1] (Guess) -->
  <property value="0.05"> buoyant_forces/heat-coeffs/emissivity </property>

  <!-- This should preferably have been exported by the gas_cell class. -->
  <property value="20.29"> buoyant_forces/gas-cell[0]/max-radius-ft </property>

  <gas_cell type="HYDROGEN">
   <location unit="M">
    <x> -0.285 </x>
    <y> 0 </y>
    <z> 10.225 </z>
   </location>
   <x_radius unit="M"> 18.085 </x_radius>
   <y_radius unit="M"> 3.582 </y_radius>
   <z_radius unit="M"> 3.582 </z_radius>
   <fullness> 0.97 </fullness>
   <!-- This corresponds to an open appendix. -->
   <max_overpressure unit="PA"> 0.0 </max_overpressure>
   <!-- Manual valve coefficient. This is a guess. -->
   <valve_coefficient unit="M4*SEC/KG"> 0.01 </valve_coefficient>

   <!-- heat exchange with the environment. [lb ft / sec] -->
   <heat>
    <function name="buoyant_forces/gas-cell/dU_conduction">
     <product>
      <value> 7982.25 </value> <!-- Surface area [ft2] -->
      <property> buoyant_forces/heat-coeffs/conductivity </property>
      <difference>
       <property> atmosphere/T-R </property>
       <property> buoyant_forces/gas-cell/temp-R </property>
      </difference>
     </product>
    </function>
    <function name="buoyant_forces/gas-cell/dU_radiation">
     <product>
      <value> 0.1714e-8 </value> <!-- Stefan-Boltzmann's constant
                                      [Btu / (h ft^2 R^4)] -->
      <property> buoyant_forces/heat-coeffs/emissivity </property>
      <value>   7982.25 </value> <!-- Surface area [ft2] -->
      <difference>
       <pow>
        <property> atmosphere/T-R </property>
        <value> 4.0 </value>
       </pow>
       <pow>
        <property> buoyant_forces/gas-cell/temp-R </property>
        <value> 4.0 </value>
       </pow>
      </difference>
     </product>
    </function>
    <!-- Heat gain due to solar radiation. Pure guess work. -->
    <function name="buoyant_forces/gas-cell/dU_solar_radiation">
     <product>
      <value>   7.2330 </value> <!-- Conversion to [lb ft / s] -->
      <value>   120.18 </value> <!-- Estimated projected surface area [m2] -->
      <value>  1300.00 </value> <!-- Solar energy flow [W/m2] -->
      <value>     0.03 </value> <!-- Guess -->
      <property> environment/sun-radiation-norm </property>
      <max>
       <value> 0.0 </value>
       <difference>
        <value> 1.5708 </value>
        <property> environment/sun-angle-rad </property>
       </difference>
      </max>
     </product>
    </function>
   </heat>
  </gas_cell>

 </buoyant_forces>

 <!--
 === Ground reactions =======================================================
 -->
 <ground_reactions>

      <contact type="BOGEY" name="MAIN"><!-- cp1 -->
   <location unit="M">
     <x> -1.0143 </x>
     <y> 0.00 </y>
     <z> -0.1678 </z>
   </location>
   <static_friction>  0.60 </static_friction>
   <dynamic_friction> 0.50 </dynamic_friction>
   <rolling_friction> 0.02 </rolling_friction>
   <spring_coeff unit="LBS/FT">1290.00 </spring_coeff>
   <damping_coeff unit="LBS/FT/SEC">467.80 </damping_coeff>
   <max_steer unit="DEG"> 0.0 </max_steer>
   <brake_group> LEFT </brake_group>
   <retractable>0</retractable>
 </contact>

  <contact type="STRUCTURE" name="FRAME_FRONT_CENTER">
   <location unit="M">
    <x>  4.441  </x>
    <y>  0.0  </y>
    <z> 0.662 </z>
   </location>
   <static_friction> 0.5 </static_friction>
   <dynamic_friction> 0.5 </dynamic_friction>
   <rolling_friction> 1.0 </rolling_friction>
   <spring_coeff unit="N/M"> 25000 </spring_coeff>
   <damping_coeff unit="N/M/SEC"> 5000 </damping_coeff>
  </contact>

  <contact type="STRUCTURE" name="FRAME_REAR_CENTER">
   <location unit="M">
    <x> -3.965 </x>
    <y> 0.0 </y>
    <z> 0.662  </z>
   </location>
   <static_friction> 0.5 </static_friction>
   <dynamic_friction> 0.5 </dynamic_friction>
   <rolling_friction> 1.0 </rolling_friction>
   <spring_coeff unit="N/M"> 25000 </spring_coeff>
   <damping_coeff unit="N/M/SEC"> 5000 </damping_coeff>
  </contact>
  <contact type="STRUCTURE" name="FRAME_FRONT">
   <location unit="M">
    <x> 7.537 </x>
    <y>  0.0 </y>
    <z>  0.903  </z>
   </location>
   <static_friction> 0.5 </static_friction>
   <dynamic_friction> 0.5 </dynamic_friction>
   <rolling_friction> 1.0 </rolling_friction>
   <spring_coeff unit="N/M"> 25000 </spring_coeff>
   <damping_coeff unit="N/M/SEC"> 5000 </damping_coeff>
  </contact>
  <contact type="STRUCTURE" name="FRAME_RUDDER_KINGPOST">
   <location unit="M">
    <x>  -7.104 </x>
    <y> 0.0 </y>
    <z>  0.68  </z>
   </location>
   <static_friction> 0.5 </static_friction>
   <dynamic_friction> 0.5 </dynamic_friction>
   <rolling_friction> 1.0 </rolling_friction>
   <spring_coeff unit="N/M"> 25000 </spring_coeff>
   <damping_coeff unit="N/M/SEC"> 5000 </damping_coeff>
  </contact>

  <contact type="STRUCTURE" name="FRONT_OF_ENVELOPE">
   <location unit="M">
    <x> 19.30  </x>
    <y>  0    </y>
    <z> 8.127 </z>
   </location>
   <static_friction> 0.5 </static_friction>
   <dynamic_friction> 0.5 </dynamic_friction>
   <rolling_friction> 1.0 </rolling_friction>
   <spring_coeff unit="N/M"> 25000 </spring_coeff>
   <damping_coeff unit="N/M/SEC"> 5000 </damping_coeff>
  </contact>

  <contact type="STRUCTURE" name="REAR_OF_ENVELOPE">
   <location unit="M">
    <x>  20.31  </x>
    <y>  0    </y>
    <z> 8.125 </z>
   </location>
   <static_friction> 0.5 </static_friction>
   <dynamic_friction> 0.5 </dynamic_friction>
   <rolling_friction> 1.0 </rolling_friction>
   <spring_coeff unit="N/M"> 25000 </spring_coeff>
   <damping_coeff unit="N/M/SEC"> 5000 </damping_coeff>
  </contact>

 </ground_reactions>

 <propulsion>
  <engine file="eng_AnzaniV4">
   <location unit="M">
    <x> 1.123 </x>
    <y>  0.00 </y>
    <z> 1.076 </z>
   </location>
   <orient unit="DEG">
    <roll>  0.0 </roll>
    <pitch> 0.0 </pitch>
    <yaw>   0.0 </yaw>
   </orient>
   <feed>0</feed>
   <thruster file="prop_g_blimpL">
    <location unit="M">
     <x> 1.774 </x>
     <y>  -1.652 </y>
     <z> 1.56 </z>
    </location>
    <orient unit="DEG">
     <roll>  0.0 </roll>
     <pitch> 0.0 </pitch>
     <yaw>   0.0 </yaw>
    </orient>
   </thruster>
  </engine>
  <engine file="eng_AnzaniV4">
   <location unit="M">
    <x> 1.123 </x>
    <y>  0.00 </y>
    <z> 1.076 </z>
   </location>
   <orient unit="DEG">
    <roll>  0.0 </roll>
    <pitch> 0.0 </pitch>
    <yaw>   0.0 </yaw>
   </orient>
   <feed>0</feed>
   <thruster file="prop_g_blimpL">
    <location unit="M">
     <x> 1.774 </x>
     <y>  1.652 </y>
     <z> 1.56 </z>
    </location>
    <orient unit="DEG">
     <roll>  0.0 </roll>
     <pitch> 0.0 </pitch>
     <yaw>   0.0 </yaw>
    </orient>
   </thruster>
  </engine>
   <tank type="FUEL" number="0">
   <location unit="M">
    <x> 0.26 </x>
    <y> 0.00 </y>
    <z>  1.76 </z>
   </location>
   <capacity unit="KG"> 46.39 </capacity>
   <contents unit="KG"> 40.39 </contents>
  </tank>
 </propulsion>


 <flight_control name="FCS: Model-G-BlimpJSB">

   <system file="FCS-pitch"/>
   <system file="FCS-yaw"/>
   <system file="animation-jsbsim"/>

  <!-- INTERFACE PROPERTIES -->
  <property>fcs/gas-valve-cmd-norm</property>
  <property>fcs/rip-cmd-norm</property>

  <!-- CHANNELS -->
  <channel name="Gas">

   <summer name="Gas Valve Sum">
    <input>fcs/gas-valve-cmd-norm</input>
    <clipto>
     <min>0</min>
     <max>1</max>
    </clipto>
   </summer>

   <fcs_function name="Gas Valve Control">
    <function>
     <sum>
      <property>fcs/gas-valve-sum</property>
      <product>
       <value>5.0</value>
       <property>fcs/rip-cmd-norm</property>
      </product>
     </sum>
    </function>
    <output>buoyant_forces/gas-cell/valve_open</output>
   </fcs_function>
  </channel>

  <channel name="Joystick input">

   <pure_gain name="Aileron wrapper L">
    <input> fcs/aileron-cmd-norm </input>
    <gain> 1 </gain>
    <output> fcs/left-aileron-pos-norm </output>
   </pure_gain>
   <pure_gain name="Aileron wrapper R">
    <input> fcs/aileron-cmd-norm </input>
    <gain> -1 </gain>
    <output> fcs/right-aileron-pos-norm </output>
   </pure_gain>

   <pure_gain name="Elevator wrapper">
    <input> fcs/elevator-cmd-norm </input>
    <gain> 1 </gain>
    <output> fcs/elevator-pos-norm </output>
   </pure_gain>

   <pure_gain name="Rudder wrapper">
    <input> fcs/rudder-cmd-norm </input>
    <gain> 1 </gain>
    <output> fcs/rudder-pos-norm </output>
   </pure_gain>

  </channel>

 </flight_control>

 <!-- <system file="animation-jsbsim"/> -->

 <!--
 ==== External reactions ====================================================
 -->

 <external_reactions>

  <force name="added-mass-bx" frame="BODY">
   <location unit="M">
    <x>  0.0 </x>
    <y>  0.0 </y>
    <z>  0.0 </z>
   </location>
   <direction>
    <x> 1.0 </x>
    <y> 0.0 </y>
    <z> 0.0 </z>
   </direction>
  </force>
  <force name="added-mass-by" frame="BODY">
   <location unit="M">
    <x>  0.0 </x>
    <y>  0.0 </y>
    <z>  0.0 </z>
   </location>
   <direction>
    <x> 0.0 </x>
    <y> 1.0 </y>
    <z> 0.0 </z>
   </direction>
  </force>
  <force name="added-mass-bz" frame="BODY">
   <location unit="M">
    <x>  0.0 </x>
    <y>  0.0 </y>
    <z>  0.0 </z>
   </location>
   <direction>
    <x> 0.0 </x>
    <y> 0.0 </y>
    <z> 1.0 </z>
   </direction>
  </force>

  <force name="added-mass-pitch[0]" frame="BODY">
   <location unit="M">
    <x>  0.0 </x>
    <y>  0.0 </y>
    <z> -0.3048 </z>
   </location>
   <direction>
    <x> 1.0 </x>
    <y> 0.0 </y>
    <z> 0.0 </z>
   </direction>
  </force>
  <force name="added-mass-pitch[1]" frame="BODY">
   <location unit="M">
    <x>  0.0 </x>
    <y>  0.0 </y>
    <z>  0.3048 </z>
   </location>
   <direction>
    <x> 1.0 </x>
    <y> 0.0 </y>
    <z> 0.0 </z>
   </direction>
  </force>

  <force name="added-mass-yaw[0]" frame="BODY">
   <location unit="M">
    <x>  0.0 </x>
    <y> -0.3048 </y>
    <z>  0.0 </z>
   </location>
   <direction>
    <x> 1.0 </x>
    <y> 0.0 </y>
    <z> 0.0 </z>
   </direction>
  </force>
  <force name="added-mass-yaw[1]" frame="BODY">
   <location unit="M">
    <x>  0.0 </x>
    <y>  0.3048 </y>
    <z>  0.0 </z>
   </location>
   <direction>
    <x> 1.0 </x>
    <y> 0.0 </y>
    <z> 0.0 </z>
   </direction>
  </force>

 </external_reactions>

 <!--
 === Aerodynamics ===========================================================
 -->

 <system name="constants">

  <!-- Aerodynamic constants. -->
  <property value="121.29"> aero/constants/length-ft </property>
  <property value="23.503"> aero/constants/diameter-ft </property>
  <property value="13566.37"> aero/constants/length-diameter-ft2 </property>
  <property value="49000.00"> aero/constants/volume-ft3 </property>
  <property value="1269.99"> aero/constants/volume-ft3_2_3 </property>

  <!-- Added mass constants. -->
  <property value="-0.07"> aero/constants/added-mass/k-axial </property>
  <property value="-0.50"> aero/constants/added-mass/k-traverse </property>
  <property value="-0.37"> aero/constants/added-mass/k-rotational </property>
  <property value="0.70"> aero/constants/added-mass/tweak-factor </property>

 </system>

 <system file="airship_added_mass"/>

 <aerodynamics>

<!--  NOTE: The drag coefficients has been estimated using a virtual
            wind-tunnel setup in gerris, a fluid dynamics simulator.
            The viability of this approach is not yet evaluated.  -->


     <function name="aero/qbar_tail-psf">
      <description>Thrust tube effects at tail</description>
      <sum>
          <property>aero/qbar-psf</property>
          <product>
            <property>forces/fbx-prop-lbs</property>
            <value>0.03</value>
          </product>
      </sum>
    </function>

 <function name="aero/function/ground-effect-factor-lift">
   <description>Change in lift due to ground effect factor</description>
   <product>
    <table>
     <independentVar lookup="row">aero/h_b-mac-ft</independentVar>
     <tableData>
        0.0  1.158
        0.1  1.137
        0.15 1.123
        0.2  1.105
        0.3  1.076
        0.4  1.035
        0.5  1.019
        0.6  1.09
        0.7  1.006
        0.8  1.004
        0.9  1.002
        1.0  1.001
        1.1  1.0
     </tableData>
    </table>
   </product>
  </function>

  <axis name="LIFT">

 <function name="aero/force/Lift_alpha">
      <description>Lift due to alpha</description>
      <product>
          <property>aero/qbar-psf</property>
          <property>metrics/Sw-sqft</property>
          <table>
            <independentVar lookup="row">aero/alpha-rad</independentVar>
            <tableData>
              -0.2443        -0.765
              -0.1918        -0.509
              -0.1745        -0.315
              -0.1396        -0.1845
              -0.1047        -0.075
              -0.06981       -0.0446
              -0.03435       -0.0181
               0.000         0.00
               0.03435       0.0181
               0.06981       0.0446
               0.1047        0.075
               0.1396        0.1845
               0.1745        0.315
               0.1918        0.509
               0.2443        0.765
            </tableData>
          </table>
      </product>
    </function>


  <function name="aero/force/Lift_elevator">
       <description>Lift due to Elevator Deflection</description>
       <product>
           <property>aero/qbar-psf</property>
           <property>metrics/Sw-sqft</property>
           <property>fcs/elevator-pos-norm</property>
           <value>0.007</value>
       </product>
    </function>

  </axis>

  <axis name="DRAG">
   <function name="aero/coefficient/CDh">
    <description>Drag</description>
    <product>
     <property>aero/qbar-psf</property>
     <property>aero/constants/volume-ft3_2_3</property>
     <value> 1.116 </value>
     <table>
      <independentVar lookup="row">aero/alpha-rad</independentVar>
      <tableData>
       -1.318    0.72
       -0.418    0.272
       -0.209    0.108
       -0.1221   0.0846
       -0.06981  0.05952
       -0.03491  0.0388
       0        0.021
       0.03491  0.0388
       0.06981  0.05952
       0.1221   0.0846
       0.209    0.108
       0.418    0.272
       1.318    0.72
      </tableData>
     </table>
    </product>
   </function>
  </axis>

    <axis name="SIDE">

      <function name="aero/coefficient/CYb">
       <description>Side_force_due_to_beta</description>
       <product>
           <property>aero/qbar-psf</property>
           <property>metrics/Sw-sqft</property>
           <property>aero/beta-rad</property>
           <value>-0.26</value>
       </product>
    </function>

  </axis>

<axis name="YAW">

 <function name="aero/moment/Yaw_rudder">
       <description>Yaw moment due to rudder</description>
       <product>
           <property>aero/qbar-psf</property>
           <property>metrics/Sw-sqft</property>
           <property>metrics/bw-ft</property>
           <property>fcs/rudder-pos-norm</property>
           <value>-0.0022</value>
       </product>
    </function>

      <function name="aero/coefficient/Cnr">
       <description>Yaw_moment_due_to_yaw_rate</description>
       <product>
           <property>aero/qbar-psf</property>
           <property>metrics/Sw-sqft</property>
           <property>metrics/bw-ft</property>
           <property>aero/bi2vel</property>
           <property>velocities/r-aero-rad_sec</property>
           <value>-0.015</value>
       </product>
    </function>

 </axis>

  <axis name="ROLL">
   <function name="aero/coefficient/Clp">
    <description>Roll_moment_due_to_roll_rate_(roll_damping)</description>
    <!-- Wild guess: K * basket area * moment arm * "p_inf" -->
    <!-- The current version is just a hack to make the balloon stable. -->
    <product>
     <value> -7.0 </value>
     <value> 14.1 </value>
     <value> 47.0 </value>
     <!--property>aero/bi2vel</property-->
     <property>velocities/p-aero-rad_sec</property>
    </product>
   </function>

      <function name="aero/coefficient/Cldr">
       <description>Roll_moment_due_to_rudder</description>
       <product>
           <property>aero/qbar-psf</property>
           <property>metrics/Sw-sqft</property>
           <property>metrics/bw-ft</property>
           <property>fcs/rudder-pos-norm</property>
           <value>0.00007</value>
       </product>
    </function>

  </axis>

  <axis name="PITCH">

       <function name="aero/coefficient/Cmde">
       <description>Pitch_moment_due_to_elevator</description>
       <product>
          <property>aero/qbar-psf</property>
          <property>metrics/Sw-sqft</property>
          <property>metrics/cbarw-ft</property>
          <property>fcs/elevator-pos-norm</property>
          <value>-0.003</value>
       </product>
    </function>

   <function name="aero/coefficient/Cmq">
    <description>Pitch_moment_due_to_pitch_rate_(damping)</description>
    <!-- Wild guess: K * basket area * moment arm * "p_inf" -->
    <!-- The current version is just a hack to make the balloon stable. -->
    <product>
     <value> -17.0 </value>
     <value> 14.1 </value>
     <value> 47.0 </value>
     <!--property>aero/ci2vel</property-->
     <property>velocities/q-aero-rad_sec</property>
    </product>
   </function>
  </axis>

 </aerodynamics>

</fdm_config>
